Simulations: Version=173
  DataStore
  Experiment Exp
    Factors
      Permutation For
        Factor Lead: Specification=[AutoIrrigate].Script.Lead = 3, 7
        Factor MissProb: Specification=[AutoIrrigate].Script.MissProb = 0, 35, 70
        Factor FAlarmProb: Specification=[AutoIrrigate].Script.FAlarmProb = 0, 35, 70
        Factor MaxErr: Specification=[AutoIrrigate].Script.MaxErr = 100
        Factor SuffFrac: Specification=[AutoIrrigate].Script.SuffFrac = 0.5, 2.0
        Factor SowN: Specification=[SowFertilising].Script.Amount = 100, 350
        Factor Soil
          CompositeFactor PAWC100-Furrow
            Specifications:
              [AutoIrrigate].Script.FASWDepth = 600
              [AutoIrrigate].Script.FASWThreshold = 0.70
              [AutoIrrigate].Script.IrrigDepth = 60
              [Soil]
            Soil: ASCOrder=Vertosol; ASCSubOrder=Black; SoilType=Black Vertosol; Site=Generic-Qld; State=Generic; Country=Australia; ApsoilNumber=497-GENERIC; Latitude=-27.5643; Longitude=151.954; LocationAccuracy=Regional Soil Type; YearOfSampling=0; DataSource=Generic soil.; Comments=PAWC=100mm
              Physical
                Thickness  ParticleSizeClay  ParticleSizeSand  ParticleSizeSilt  Rocks  BD    AirDry  LL15   DUL    SAT
                150        30                5                 65                0      0.99  0.1     0.305  0.51   0.6
                150        30                5                 65                0      1.06  0.153   0.31   0.49   0.57
                150        30                5                 65                0      1.13  0.3     0.33   0.47   0.54
                150        30                5                 65                0      1.13  0.3     0.33   0.472  0.54
                BD, DUL, SAT source: Laboratory measured
                AirDry source: Unknown source or quality of data, Laboratory measured
                LL15 source: Estimated based on local knowledge, Laboratory measured
                Rocks, ParticleSizeSand, ParticleSizeSilt, ParticleSizeClay source: Calculated
                SoilCrop wheatSoil: LL=[0.305, 0.31, 0.33, 0.33]; KL=[0.06, 0.06, 0.06, 0.06]; XF=[1, 1, 1, 1]
                  LL source: Estimated based on local knowledge
                SoilCrop chickpeaSoil: same as Exp.Factors.For.Soil.PAWC100-Furrow.Soil.Physical.wheatSoil
                SoilCrop mungbeanSoil: same as Exp.Factors.For.Soil.PAWC100-Furrow.Soil.Physical.wheatSoil
                SoilCrop soybeanSoil: same as Exp.Factors.For.Soil.PAWC100-Furrow.Soil.Physical.wheatSoil
                SoilCrop MaizeSoil: same as Exp.Factors.For.Soil.PAWC100-Furrow.Soil.Physical.wheatSoil
                SoilCrop SorghumSoil: LL=[0.305, 0.31, 0.33, 0.33]; KL=[0.07, 0.07, 0.07, 0.07]; XF=[1, 1, 1, 1]
                  LL, KL, XF source: Estimated
                SoilCrop CottonSoil: LL=[0.305, 0.31, 0.33, 0.33]; KL=[0.1, 0.1, 0.1, 0.1]; XF=[1, 1, 1, 1]
                  LL, KL, XF source: Estimated
              WaterBalance SoilWater: SummerDate=1-Nov; SummerU=6; SummerCona=3.5; WinterDate=1-Apr; WinterU=4; WinterCona=2.5; DiffusConst=40; DiffusSlope=16; Salb=0.12; CN2Bare=73; CNRed=20; CNCov=0.8; PSIDul=-100; Thickness=[250, 200, 350, 300]; SWCON=[0.5, 0.5, 0.5, 0.5]
              Organic: FOMCNRatio=30; CarbonUnits=Total
                Thickness  Carbon  SoilCNRatio  FBiom  FInert  FOM
                150        1       12.5         0.025  0.4     379.705
                150        0.8     12.5         0.012  0.5     306.466
                150        0.6     12.5         0.005  0.6     161.136
                150        0.5     12.5         0.005  0.8     84.724
              Chemical: PHUnits=Water
                Thickness  PH   EC
                150        8.2  0.2
                150        8.7  0.3
                150        8.9  0.3
                150        8.1  0.4
                PH source: Estimated based on local knowledge
              Nutrient
              Water: Thickness=[150, 150, 150, 150]; InitialValues=[0.366, 0.364, 0.372, 0.373]; InitialPAWmm=30; RelativeTo=LL15; FilledFromTop=false
              Solute NO3: Thickness=[150, 150, 150, 150]; InitialValues=[0.25, 1, 2, 0.75]; InitialValuesUnits=kg/ha; WaterTableConcentration=0; D0=0; DepthConstant=0; MaxDepthSoluteAccessible=0; RunoffEffectivenessAtMovingSolute=0; MaxEffectiveRunoff=0
              Solute NH4: Thickness=[150, 150, 150, 150]; InitialValues=[1.49, 1.11, 1.7, 1.7]; InitialValuesUnits=kg/ha; WaterTableConcentration=0; D0=0; DepthConstant=0; MaxDepthSoluteAccessible=0; RunoffEffectivenessAtMovingSolute=0; MaxEffectiveRunoff=0
              Solute Urea: Thickness=[150, 150, 150, 150]; InitialValues=[0, 0, 0, 0]; InitialValuesUnits=ppm; WaterTableConcentration=0; D0=0; DepthConstant=0; MaxDepthSoluteAccessible=0; RunoffEffectivenessAtMovingSolute=0; MaxEffectiveRunoff=0
              CERESSoilTemperature Temperature
              CERESSoilTemperature SoilTemperature
          CompositeFactor PAWC100-Sprinkler
            Specifications:
              [AutoIrrigate].Script.FASWDepth = 600
              [AutoIrrigate].Script.FASWThreshold = 0.85
              [AutoIrrigate].Script.IrrigDepth = 19
              [Soil]
            Soil: same as Exp.Factors.For.Soil.PAWC100-Furrow.Soil
          CompositeFactor PAWC240-Furrow
            Specifications:
              [AutoIrrigate].Script.FASWDepth = 1200
              [AutoIrrigate].Script.FASWThreshold = 0.70
              [AutoIrrigate].Script.IrrigDepth = 135
              [Soil]
            Soil: ASCOrder=Vertosol; ASCSubOrder=Black; SoilType=Black Vertosol; Site=Generic-Qld; State=Generic; Country=Australia; ApsoilNumber=497-GENERIC; Latitude=-27.5643; Longitude=151.954; LocationAccuracy=Regional Soil Type; YearOfSampling=0; DataSource=Generic soil.; Comments=PAWC=240mm
              Physical
                Thickness  ParticleSizeClay  ParticleSizeSand  ParticleSizeSilt  Rocks  BD    AirDry  LL15   DUL    SAT
                150        30                5                 65                0      0.99  0.1     0.28   0.51   0.6
                150        30                5                 65                0      1.06  0.153   0.3    0.5    0.57
                300        30                5                 65                0      1.13  0.3     0.31   0.495  0.54
                300        30                5                 65                0      1.11  0.31    0.318  0.495  0.55
                300        30                5                 65                0      1.12  0.32    0.32   0.49   0.55
                100        30                5                 65                0      1.15  0.33    0.33   0.489  0.53
                BD source: Unknown source or quality of data
                AirDry, LL15, DUL, SAT source: Estimated based on local knowledge
                Rocks, ParticleSizeSand, ParticleSizeSilt, ParticleSizeClay source: Calculated
                SoilCrop wheatSoil: LL=[0.28, 0.3, 0.31, 0.318, 0.32, 0.33]; KL=[0.06, 0.06, 0.06, 0.06, 0.05, 0.04]; XF=[1, 1, 1, 1, 1, 1]
                  LL source: Estimated based on local knowledge
                SoilCrop chickpeaSoil: same as Exp.Factors.For.Soil.PAWC240-Furrow.Soil.Physical.wheatSoil
                SoilCrop mungbeanSoil: same as Exp.Factors.For.Soil.PAWC240-Furrow.Soil.Physical.wheatSoil
                SoilCrop soybeanSoil: same as Exp.Factors.For.Soil.PAWC240-Furrow.Soil.Physical.wheatSoil
                SoilCrop MaizeSoil: same as Exp.Factors.For.Soil.PAWC240-Furrow.Soil.Physical.wheatSoil
                SoilCrop SorghumSoil: LL=[0.28, 0.3, 0.31, 0.356, 0.376, 0.4]; KL=[0.07, 0.07, 0.07, 0.05, 0.05, 0.04]; XF=[1, 1, 1, 1, 1, 1]
                  LL, KL, XF source: Estimated
                SoilCrop CottonSoil: LL=[0.28, 0.3, 0.31, 0.318, 0.343, 0.368]; KL=[0.1, 0.1, 0.1, 0.1, 0.09, 0.07]; XF=[1, 1, 1, 1, 1, 1]
                  LL, KL, XF source: Estimated
              WaterBalance SoilWater: SummerDate=1-Nov; SummerU=6; SummerCona=3.5; WinterDate=1-Apr; WinterU=4; WinterCona=2.5; DiffusConst=40; DiffusSlope=16; Salb=0.12; CN2Bare=73; CNRed=20; CNCov=0.8; PSIDul=-100; Thickness=[100, 100, 300, 300, 300, 300]; SWCON=[0.5, 0.5, 0.5, 0.5, 0.5, 0.5]
              Organic: FOMCNRatio=40; CarbonUnits=Total
                Thickness  Carbon  SoilCNRatio  FBiom  FInert  FOM
                150        1       12.5         0.025  0.4     379.705
                150        0.8     12.5         0.012  0.5     306.466
                300        0.6     12.5         0.005  0.6     161.136
                300        0.5     12.5         0.005  0.8     84.724
                300        0.4     12.5         0.005  0.9     44.547
                100        0.4     12.5         0.005  0.9     23.422
              Chemical: PHUnits=Water
                Thickness  PH   EC
                150        8.2  0.2
                150        8.7  0.3
                300        8.9  0.3
                300        8.1  0.4
                300        8    0.6
                100        8    0.8
                PH source: Estimated based on local knowledge
              Nutrient
              Water: Thickness=[100, 100, 300, 300, 300, 300]; InitialValues=[0.34, 0.35, 0.35, 0.354, 0.37, 0.37]; InitialPAWmm=64.8; RelativeTo=LL15; FilledFromTop=false
              Solute NO3: Thickness=[150, 150, 300, 300, 300, 100]; InitialValues=[0.25, 0.5, 1, 1, 0.5, 0.75]; InitialValuesUnits=kg/ha; WaterTableConcentration=0; D0=0; DepthConstant=0; MaxDepthSoluteAccessible=0; RunoffEffectivenessAtMovingSolute=0; MaxEffectiveRunoff=0
              Solute NH4: Thickness=[150, 150, 300, 300, 300, 100]; InitialValues=[1.485, 0.8, 1.3, 0.85, 0.815, 0.75]; InitialValuesUnits=kg/ha; WaterTableConcentration=0; D0=0; DepthConstant=0; MaxDepthSoluteAccessible=0; RunoffEffectivenessAtMovingSolute=0; MaxEffectiveRunoff=0
              Solute Urea: Thickness=[150, 150, 300, 300, 300, 100]; InitialValues=[0, 0, 0, 0, 0, 0]; InitialValuesUnits=ppm; WaterTableConcentration=0; D0=0; DepthConstant=0; MaxDepthSoluteAccessible=0; RunoffEffectivenessAtMovingSolute=0; MaxEffectiveRunoff=0
              CERESSoilTemperature Temperature
              CERESSoilTemperature SoilTemperature
          CompositeFactor PAWC240-Sprinkler
            Specifications:
              [AutoIrrigate].Script.FASWDepth = 900
              [AutoIrrigate].Script.FASWThreshold = 0.85
              [AutoIrrigate].Script.IrrigDepth = 33
              [Soil]
            Soil: same as Exp.Factors.For.Soil.PAWC240-Furrow.Soil
    Simulation Base
      Clock: Start=1984-01-01; End=2024-02-28
      Summary
      Weather
        FileName=C:\Users\U8019357\OneDrive - UniSQ\00_Projects\2024.04.26 Short-Term Forecast for Irrigation Management\04_Data\Weather Files\Modified\AU-Emerald.met
      SoilArbitrator
      MicroClimate: a_interception=0; b_interception=1; c_interception=0; d_interception=0; SoilHeatFluxFraction=0.4; MinimumHeightDiffForNewLayer=0; NightInterceptionFraction=0.5; ReferenceHeight=2
      Zone Field: Area=1; Slope=0; AspectAngle=0; Altitude=50
        Manager AutoIrrigate
          Crop = [Maize]
          AutoIrrigationOn = True
          FASWThreshold = 0.6
          FASWDepth = 900
          IrrigDepth = 50
          afterSowing = 0
          minGap = 2
          Lead = 3
          Lag = 7
          MissProb = 0
          MaxErr = 0
          SuffFrac = 0.5
          FAlarmProb = 0
```csharp
using Models.Interfaces;
using System;
using System.Linq;
using Models.Core;
using System.Collections.Generic;
using System.Text;
using Models.Soils;
using Models.PMF;
using Models.Climate;
using Models;
using System.Xml.Serialization;
using APSIM.Shared.Utilities;
using Models.Interfaces;

namespace Models
{
    [Serializable] 
    public class Script : Model
    {
        [Link] private Plant plant;
        [Link] private Zone zone;
        [Link] private Irrigation irrigation;
        [Link] private ISoilWater waterBalance;
        [Link] private IPhysical soilPhysical;
        [Link] private Weather weather;
        [Link] private ISummary summary;

		/// ===================================================================================================				  		
        [Description("Crop to irrigate")]
        public IPlant Crop { get; set; }

		[Separator("Irrigation Parameters")]        
        [Description("Auto irrigation on?")]
        public bool AutoIrrigationOn { get; set; }       

        [Description("Threshold fraction available water (0-1)")]
        public double FASWThreshold { get; set; }

        [Description("Soil depth (mm) to calculate fraction available water. Negative will use hard-coded values.")]
        public double FASWDepth { get; set; }
        
        [Description("Irrigation depth (mm). Negative will be ignored.")]
        public double IrrigDepth { get; set; }        

        [Description("Minimum days after sowing for first irrigation")]
        public int afterSowing { get; set; }  
        
        [Description("Minimum days between two irrigations")]
        public double minGap { get; set; }          
                
		/// ===================================================================================================
		[Separator("Forecast Parameters")]
		
        [Description("Lead time (days).")]
        public int Lead { get; set; }
        
        [Description("Lag time to calculate MeanETc (days).")]
        public int Lag { get; set; }        

        [Description("Chance of missing rainfall events (%).")]
        public double MissProb { get; set; }
        
        [Description("Chance of falsly forecasting rainfall events (%).")]
        public double FAlarmProb { get; set; }        

        [Description("Maximum error in forecasting rain depth (%).")]
        public double MaxErr { get; set; }            

        [Description("Fraction of Lead*MeanETc to determine rainfall sufficiency.")]
        public double SuffFrac { get; set; }            
        
        /// ===================================================================================================
		public int Rep { get; set; }
		public double FASW { get; set; }
        public double WaterDeficit  { get; set; } 
        public double MeanETc  { get; set; } 
        public double MaxETc  { get; set; }
        public double ReqFutureRain  { get; set; } 
        public double TotFutureRain  { get; set; } 
        public double TotFutureRainFor  { get; set; } 
        public double RainDepthError  { get; set; }                
        public bool IrrigNeeded  { get; set; } = false;
        public bool IrrigAllowed  { get; set; } = false;
        public bool DidHit  { get; set; }
        public bool DoMiss  { get; set; }
        public bool DoFalseAlarm  { get; set; }  
        public int NumIrrig  { get; set; }  
        public int NumHits  { get; set; }    
        public int NumMisses  { get; set; }     
        public int NumFalseAlarms  { get; set; }
        public int IrrDelay  { get; set; } 
                        
		public double randX { get; set; }
		public double randY { get; set; }
		public double randZ { get; set; }
		public double SwChange { get; set; }
        public double AvailSw { get; set; }
        		                        
        private double irrigationGap = 0;             
		private double[] ETc = new double[20];		                
        
		 
		/// ===================================================================================================		        
        
        [EventSubscribe("DoWeather")]
        private void OnDoWeather(object sender, EventArgs e)
        {              	        	             	        		        	        	    	 
        	if (Lead <= 0) {
        		IrrigAllowed = true;
        		ReqFutureRain = 0;
        		MaxETc = -999;
        		
        	} else if (plant.IsAlive) {      	
		        var rand = new Random();  		
		    	TotFutureRain = weather.Rain;
		    	TotFutureRainFor = 0;		    	    
		    	        					
		    	for (int l = 1; l < Lead; l++) {
					string col = "rain_l" + l.ToString();
		    		TotFutureRain += weather.GetValue(col);   		
		    	}
		    	
		    	randX = rand.Next(0, 100);
		    	randY = rand.Next(0, 100);
		    	randZ = MaxErr==0 ? 0 : rand.Next(-(int)MaxErr, (int)MaxErr);
		    	
		    	DoMiss = MissProb==0 ? false : (randX < MissProb);
		    	DoFalseAlarm = FAlarmProb==0 ? false : (randY < FAlarmProb);
		    	DidHit = false;
		    	
		    	MeanETc = 0;
				for (int l = Lag - 2; l >= 0; l--) {
					ETc[l+1] = ETc[l];					   	
				}
				ETc[0] = plant.Leaf.WaterDemand + waterBalance.Es;				
				MeanETc = ETc.Average();
				MaxETc = Math.Max(MaxETc, ETc.Max());
							    	
		    	if (SuffFrac > 0) {					
					ReqFutureRain = SuffFrac * Lead * MeanETc;		    	
		    	} else {
					ReqFutureRain = Math.Abs(SuffFrac) * Lead;
		    	}
		    	
				RainDepthError = 0;		    	
		    	
		    	if (TotFutureRain >= ReqFutureRain) {
					// In reality, rainfall will occur and it will be sufficient to meet crop requirement over next 'halfLead' days.
							
					if (DoMiss) {
						// If DoMiss==true, forecast wrongly misses rainfall.
						IrrigAllowed = true;
						
					} else {
						// If DoMiss==false, forecast correctly shows rainfall, but its depth have MaxErr% error.
						RainDepthError = randZ;	
						TotFutureRainFor = Math.Max(0, TotFutureRain * (100 + randZ) / 100);											
						IrrigAllowed = (TotFutureRainFor < ReqFutureRain);
						DidHit = !IrrigAllowed;
						if (DidHit) DoFalseAlarm = false;
					}	
																
		    	} else {
		    	// In reality, rainfall will NOT occur or it will NOT be sufficient to meet crop requirement over next 'halfLead' days.
		    		DoMiss = DidHit = false;
		    		
		    		if (DoFalseAlarm) {
		    			IrrigAllowed = false;
		    			TotFutureRainFor = 999;
		    			
		    		} else {		    			
		    			IrrigAllowed = true;
		    			TotFutureRainFor = 0;
		    		}		    		
		    	}
		    	
        	} else {
        		IrrigAllowed = false;   
        		NumHits = 0;
        		NumMisses = 0;  
        		NumFalseAlarms = 0;  
        		MaxETc = 0; 		
        	}     
        }          
                       
		/// ===================================================================================================              
		
        [EventSubscribe("StartOfSimulation")]
        private void ErrorChecking(object sender, EventArgs args)
        {
            if (Crop == null)
                throw new Exception("No crop was specified in script " + Parent.Name);
                
            Array.Resize(ref ETc, Lag); 
            MaxETc = -999;
            IrrDelay = 0;
        } 
        
		/// ===================================================================================================              
		
        [EventSubscribe("StartOfDay")]
        private void OnStartOfDay(object sender, EventArgs args)
        {
        	CalculateFASW(); // calc FASW and WaterDeficit      
        }                         
        	
        /// ===================================================================================================         
        	
        [EventSubscribe("DoManagement")]
        private void OnDoManagement(object sender, EventArgs e)
        {        	        
            if (AutoIrrigationOn && plant.IsAlive)
            {            	
                irrigationGap += 1;             // increment gap between irrigations                
                
                if (FASW < FASWThreshold && irrigationGap >= minGap)
                {
                	IrrigNeeded = true;                	
                	if (IrrigAllowed) {
		                irrigation.Apply(WaterDeficit, depth: 0);
		                irrigationGap = 0;          // reset  
		                NumIrrig += 1;   
		                if (DoMiss) NumMisses += 1;
		                IrrDelay = 0;
		                		                                           
                	} else {
                		IrrDelay += 1;
                		if (DidHit) NumHits += 1;
                		if (DoFalseAlarm) NumFalseAlarms += 1;
                	}
                	
                } else {
                	IrrigNeeded = false; 
                	IrrDelay = 0;               	                	
                }
            }
            else
            {
            	IrrigNeeded = false;
                irrigationGap = minGap - afterSowing - 1;    // allow irrigation a number of days after it becomes alive/sown
                NumIrrig = 0;
                IrrDelay = 0;
            }
        }
        
        /// ===================================================================================================         
        
        private void CalculateFASW()
        {        	      
		    double[] LL15 = MathUtilities.Multiply(soilPhysical.LL15, soilPhysical.Thickness);
		    double[] DUL = MathUtilities.Multiply(soilPhysical.DUL, soilPhysical.Thickness);
		    
		    int nlayr = GetLayerIndex(FASWDepth);
		    double cumdep = MathUtilities.Sum(soilPhysical.Thickness, 0, nlayr, 0.0);    // tricky function that sums up to before nlayr

		    double part_layer = MathUtilities.Divide((FASWDepth - cumdep), soilPhysical.Thickness[nlayr], 0.0);

		    // note that results may be strange if swdep < ll15
		    AvailSw = (MathUtilities.Sum(waterBalance.SWmm, 0, nlayr, 0.0) + part_layer * waterBalance.SWmm[nlayr])
		                        - (MathUtilities.Sum(LL15, 0, nlayr, 0.0) + part_layer * LL15[nlayr]);

		    double pot_avail_sw = (MathUtilities.Sum(DUL, 0, nlayr, 0.0) + part_layer * DUL[nlayr])
		                            - (MathUtilities.Sum(LL15, 0, nlayr, 0.0) + part_layer * LL15[nlayr]);
		        
		    FASW = MathUtilities.Divide(AvailSw, pot_avail_sw, 0.0);
		        
		    if (IrrigDepth < 0) {  
		        WaterDeficit = MathUtilities.Constrain(pot_avail_sw - AvailSw, 0.0, 100000);
		        
            } else {
            	WaterDeficit = IrrigDepth;
            }
        }

        private int GetLayerIndex(double pointDepth)
        {
            double[] cumThickness = soilPhysical.ThicknessCumulative;
            int layerIdx = 0;
            while ((layerIdx + 1 < cumThickness.Length) && (pointDepth > cumThickness[layerIdx]))
            {
                layerIdx += 1;
            }          

            return layerIdx;
        }
    }
}
```
        Report ReportHarvest: EventNames=[Maize].Harvesting
          VariableNames:
            [Clock].Today as Today
            [Clock].Today.DayOfYear as DayOfYear
            [Maize].SowingDate.Year as SowYear
            [Clock].Today.Year as HarvestYear
            [Maize].DaysAfterSowing as DaysAfterSowing
            [Maize].Phenology.Stage as Stage
            [Maize].Phenology.AccumulatedTT as AccumulatedTT
            [Maize].Phenology.EmergenceDAS as EmergenceDAS
            [Maize].Phenology.FloweringDAS as FloweringDAS
            [Maize].Phenology.MaturityDAS as MaturityDAS
            [Maize].Grain.Total.Wt * 10 as Yield
            [Maize].AboveGround.Wt as AboveGroundWt
            [Maize].Grain.N * 10 as TotalGrainN
            [AutoIrrigate].Script.NumHits as NumHits
            [AutoIrrigate].Script.NumMisses as NumMisses
            [AutoIrrigate].Script.NumFalseAlarms as NumFalseAlarms
            [AutoIrrigate].Script.NumIrrig as NumIrrig
            Sum of [Irrigation].IrrigationApplied from [Maize].Sowing to [Maize].Harvesting as TotalIrrig
            Sum of [SoilWater].Drainage from [Maize].Sowing to [Maize].Harvesting as TotalDrain
            Sum of [SoilWater].Runoff from [Maize].Sowing to [Maize].Harvesting as TotalRunoff
            Sum of [Maize].Leaf.Transpiration from [Maize].Sowing to [Maize].Harvesting as TotalTransp
            Sum of [ISoilWater].Es from [Maize].Sowing to [Maize].Harvesting as TotalEP
            Sum of ([Maize].Leaf.Transpiration+[ISoilWater].Es) from [Maize].Sowing to [Maize].Harvesting as TotalETc
            Sum of [ISoilWater].Eo from [Maize].Sowing to [Maize].Harvesting as TotalETo
            Sum of [Weather].Rain from [Maize].Sowing to [Maize].Harvesting as InCropRain
            [Harvest].Script.SwChange as SwChange
            Sum of ([SoilWater].LeachNH4 + [SoilWater].LeachNO3 + [SoilWater].LeachUrea) from [Maize].Sowing to [Maize].Harvesting as TotalNLeach
            Sum of [Maize].Root.NUptake from [Maize].Sowing to [Maize].Harvesting as TotalNUptake
            Sum of Sum([Nutrient].Catm) from [Maize].Sowing to [Maize].Harvesting as TotalCatm
            Sum of Sum([Nutrient].Natm) from [Maize].Sowing to [Maize].Harvesting as TotalNatm
            Sum of Sum([Nutrient].N2Oatm) from [Maize].Sowing to [Maize].Harvesting as TotalN2Oatm
            Sum of Sum([Nutrient].DenitrifiedN) from [Maize].Sowing to [Maize].Harvesting as TotalDenitr
            Sum of Sum([Nutrient].NitrifiedN) from [Maize].Sowing to [Maize].Harvesting as TotalNitr
        Report ReportDaily
          VariableNames:
            [Clock].Today as Today
            [Clock].Today.DayOfYear as DayOfYear
            [Maize].SowingDate.Year as SowYear
            [Maize].DaysAfterSowing as DaysAfterSowing
            [Maize].IsAlive as IsAlive
            [AutoIrrigate].Script.AvailSw as AvailSw
            [Sowing].Script.SowSW as SowSW
            [Harvest].Script.SwChange as SwChange
            [Maize].Phenology.Stage as Stage
            [Maize].Phenology.CurrentPhaseName as CurrentPhaseName
            [Maize].Phenology.AccumulatedTT as AccumulatedTT
            [AutoIrrigate].Script.MeanETc as MeanETc
            [AutoIrrigate].Script.MaxETc as MaxETc
            [AutoIrrigate].Script.ReqFutureRain as ReqFutureRain
            [AutoIrrigate].Script.TotFutureRain as TotFutureRain
            [AutoIrrigate].Script.TotFutureRainFor as TotFutureRainFor
            [AutoIrrigate].Script.IrrigNeeded as IrrigNeeded
            [AutoIrrigate].Script.IrrigAllowed as IrrigAllowed
            [AutoIrrigate].Script.IrrDelay as IrrDelay
            [AutoIrrigate].Script.DidHit as DidHit
            [AutoIrrigate].Script.randX as randX
            [AutoIrrigate].Script.DoMiss as DoMiss
            [AutoIrrigate].Script.randY as randY
            [AutoIrrigate].Script.DoFalseAlarm as DoFalseAlarm
            [AutoIrrigate].Script.randZ as randZ
            [AutoIrrigate].Script.RainDepthError as RainDepthError
            [AutoIrrigate].Script.FASW as FASW
            [Irrigation].IrrigationApplied as Irrigation
            [Weather].Rain as Rain
            Sum([Nutrient].Natm) as Natm
            Sum([Nutrient].N2Oatm) as N2Oatm
            Sum([Denitrification].Value) as DenitrificationValue
            Sum([Denitrification].Natm) as DenitrificationNatm
            Sum([Nitrification].Value) as NitrificationValue
            Sum([Nitrification].Natm) as NitrificationNatm
          EventNames:
            [Maize].IsAlive == true
            // (bool)AutoIrrigate.GetProperty("IrrigNeeded") == true && (bool)AutoIrrigate.GetProperty("IrrigAllowed") == false
            // [Clock].StartOfDay
        Soil: ASCOrder=Vertosol; ASCSubOrder=Black; SoilType=Black Vertosol; Site=Generic-Qld; State=Generic; Country=Australia; ApsoilNumber=497-GENERIC; Latitude=-27.5643; Longitude=151.954; LocationAccuracy=Regional Soil Type; YearOfSampling=0; DataSource=Generic soil.
          Comments=state-location-maize-south_vertisol-10_oc-240_PAWC-10_kgNS-30_per
          Physical
            Thickness  ParticleSizeClay  ParticleSizeSand  ParticleSizeSilt  Rocks  BD    AirDry  LL15   DUL    SAT
            150        30                5                 65                0      0.99  0.1     0.28   0.51   0.6
            150        30                5                 65                0      1.06  0.153   0.3    0.5    0.57
            300        30                5                 65                0      1.13  0.3     0.31   0.495  0.54
            300        30                5                 65                0      1.11  0.31    0.318  0.495  0.55
            300        30                5                 65                0      1.12  0.32    0.32   0.49   0.55
            100        30                5                 65                0      1.15  0.33    0.33   0.489  0.53
            BD source: Unknown source or quality of data
            AirDry, LL15, DUL, SAT source: Estimated based on local knowledge
            Rocks, ParticleSizeSand, ParticleSizeSilt, ParticleSizeClay source: Calculated
            SoilCrop wheatSoil: same as Exp.Factors.For.Soil.PAWC240-Furrow.Soil.Physical.wheatSoil
            SoilCrop chickpeaSoil: same as Exp.Factors.For.Soil.PAWC240-Furrow.Soil.Physical.wheatSoil
            SoilCrop mungbeanSoil: same as Exp.Factors.For.Soil.PAWC240-Furrow.Soil.Physical.wheatSoil
            SoilCrop soybeanSoil: same as Exp.Factors.For.Soil.PAWC240-Furrow.Soil.Physical.wheatSoil
            SoilCrop MaizeSoil: same as Exp.Factors.For.Soil.PAWC240-Furrow.Soil.Physical.wheatSoil
            SoilCrop SorghumSoil: LL=[0.28, 0.3, 0.31, 0.355856, 0.376222, 0.399601]; KL=[0.07, 0.07, 0.07, 0.05, 0.05, 0.04]; XF=[1, 1, 1, 1, 1, 1]
              LL, KL, XF source: Estimated
            SoilCrop CottonSoil: LL=[0.28, 0.3, 0.31, 0.318, 0.343, 0.36807]; KL=[0.1, 0.1, 0.1, 0.1, 0.09, 0.07]; XF=[1, 1, 1, 1, 1, 1]
              LL, KL, XF source: Estimated
          WaterBalance SoilWater: same as Exp.Factors.For.Soil.PAWC240-Furrow.Soil.SoilWater
          Organic: same as Exp.Factors.For.Soil.PAWC240-Furrow.Soil.Organic
          Chemical: same as Exp.Factors.For.Soil.PAWC240-Furrow.Soil.Chemical
          Nutrient
          Water: Thickness=[100, 100, 300, 300, 300, 300]; InitialValues=[0.34, 0.35, 0.35, 0.354, 0.37, 0.37]; InitialPAWmm=64.8; RelativeTo=LL15; FilledFromTop=false
          Solute NO3: same as Exp.Factors.For.Soil.PAWC240-Furrow.Soil.NO3
          Solute NH4: same as Exp.Factors.For.Soil.PAWC240-Furrow.Soil.NH4
          Solute Urea: same as Exp.Factors.For.Soil.PAWC240-Furrow.Soil.Urea
          CERESSoilTemperature Temperature
          CERESSoilTemperature SoilTemperature
        Fertiliser
        SurfaceOrganicMatter: InitialResidueName=wheat_stubble; InitialResidueType=wheat; InitialResidueMass=500; InitialStandingFraction=0; InitialCPR=0; InitialCNR=100
        Irrigation
        Manager Sowing
          Crop = [Maize]
          SowDate = 15-Aug
          CultivarName = Pioneer_3153
          SowingDepth = 30
          RowSpacing = 750
          Population = 6
          OffsetDays = 0
          InitSWPerc = 50
          InitN = 100
          InitNLays = 4
          ResetWater = Yes
          ResetNutrients = Yes
          ResetSOM = Yes
```csharp
using Models.Soils.Nutrients;
using APSIM.Shared.Utilities;
using Models.Surface;
using Models.Utilities;
using Models.Soils.Nutrients;
using Models.Soils;
using Models.PMF;
using Models.Core;
using System;
using System.Linq;
using Models.Interfaces;

namespace Models
{
    [Serializable]
    public class Script : Model
    {       
        [Link] private Clock Clock;
        [Link] private ISoilWater soilWater;
        [Link] private Physical soilPhysical;
        [Link] private Nutrient nutrient;
        [Link] private SurfaceOrganicMatter SOM;
        [Link] private Summary summary;  
        [Link(ByName=true)] private Manager AutoIrrigate;
        
        [Description("Crop")]
        public IPlant Crop { get; set; }

        [Description("Sowing date (d-mmm)")]
        public string SowDate { get; set; }

        [Display(Type = DisplayType.CultivarName)]
        [Description("Cultivar to be sown")]
        public string CultivarName { get; set; }

        [Description("Sowing depth (mm)")]
        public double SowingDepth { get; set; }

        [Description("Row spacing (mm)")]
        public double RowSpacing { get; set; }

        [Description("Plant population (/m2)")]
        public double Population { get; set; }
        
        [Description("Offset by Days (Negative is Days Before, Positive is Days After)")]
        public int OffsetDays {get;set;}

        [Description("Initial Soil Moisture Relative to LL15 (% - Negative Will be Ignored)")]
        public double InitSWPerc {get;set;} = -1;

        [Description("Initial Soil N (kg/ha - Negative Will be Ignored)")]
        public double InitN {get;set;} = -1;
        
        [Description("Initial Soil N Divided Among How Many Layers?")]
        public int InitNLays {get;set;} = 4;        
                
        [Description("Reset Water? (Yes or No)")]
        public string ResetWater {get;set;}

        [Description("Reset Soil Nutrients ? (Yes or No)")]
        public string ResetNutrients {get;set;}

        [Description("Reset Surface Organic Matter? (Yes or No)")]
        public string ResetSOM {get;set;}
        
        public int SowYear {get;set;}
        public double SowSW {get;set;}   
                 
        
        [EventSubscribe("DoManagement")]
        private void OnDoManagement(object sender, EventArgs e)
        {
            DateTime offsetDate = DateUtilities.GetDate(SowDate, Clock.Today).AddDays(OffsetDays);
            
            if (offsetDate.Equals(Clock.Today))
            {
                if (ResetWater == "Yes")
                {
                    summary.WriteMessage(this, "Reset Water", MessageType.Diagnostic);
                    
					if (InitSWPerc >= 0) {
						double[] newSW = new double[soilPhysical.DUL.Length];
						for (int layer = 0; layer < soilPhysical.DUL.Length; layer++)
						{
							newSW[layer] = soilPhysical.LL15[layer] + InitSWPerc * (soilPhysical.DUL[layer] - soilPhysical.LL15[layer]) / 100;
						}
						soilWater.SW = newSW;
						
					} else {
						soilWater.Reset();
					}                                        
                }
                if (ResetNutrients == "Yes")
                {
                    summary.WriteMessage(this, "Reset Nitrogen", MessageType.Diagnostic);
                    
					if (InitN >= 0) {	
						nutrient.NO3.kgha = new double[nutrient.NO3.kgha.Length];
						double[] newNO3 = new double[nutrient.NO3.kgha.Length];
						int nLayers = Math.Min(InitNLays, nutrient.NO3.kgha.Length);
						
						for (int layer = 0; layer < nLayers; layer++)
						{
							newNO3[layer] = InitN / nLayers;
						}
						nutrient.NO3.kgha = newNO3;
						
					} else {
						nutrient.Reset();
					}                                        
                }
                if (ResetSOM == "Yes")
                {
                    summary.WriteMessage(this, "Reset Surface OM", MessageType.Diagnostic);
                    SOM.Reset();
                }
            }
            
            if (DateUtilities.WithinDates(SowDate, Clock.Today, SowDate))
            {
                Crop.Sow(population: Population, cultivar: CultivarName, depth: SowingDepth, rowSpacing: RowSpacing); 
                SowYear = Clock.Today.Year; 
                SowSW = (double)AutoIrrigate.GetProperty("AvailSw");
            }
            
            if (!Crop.IsAlive) {
            	SowYear = 0;
            	SowSW = 0;
            }
        }        
    }
}
```
        Manager SowFertilising
          Amount = 200
          Crop = [Maize]
          FertiliserType = NO3N
```csharp
using Models.Soils;
using System;
using System.Linq;
using Models.Core;
using Models.PMF;
namespace Models
{
    [Serializable]
    public class Script : Model
    {
        [Link] Clock Clock;
        [Link] Fertiliser Fertiliser;
        
        [Description("Crop to be fertilised")]
        public IPlant Crop { get; set; }

        [Description("Type of fertiliser to apply? ")] 
        public Fertiliser.Types FertiliserType { get; set; }
    
        [Description("Amount of fertiliser to be applied (kg/ha)")]
        public double Amount { get; set; }
        
        [EventSubscribe("Sowing")]
        private void OnSowing(object sender, EventArgs e)
        {
            Model crop = sender as Model;
            if (Crop != null && crop.Name.ToLower() == (Crop as IModel).Name.ToLower())
                Fertiliser.Apply(Amount: Amount, Type: FertiliserType);
        }
    }
}
```
        Manager CO2Trend
          C3 = 1.4507E-08
          C2 = 8.01174e-05
          C1 = 0.057666
          C0 = 314.802402
          Target = -1
          RCP = RCP85
          KeepAt = -1
          KeepAtYear = -1
```csharp
using Models.Soils.Nutrients;
using APSIM.Shared.Utilities;
using Models.Surface;
using Models.Utilities;
using Models.Soils.Nutrients;
using Models.Soils;
using Models.PMF;
using Models.Core;
using System;
using System.Linq;
using Models.Interfaces;

namespace Models
{
    [Serializable]
    public class Script : Model
    {
        [Link] private Clock Clock;
        [Link] private IWeather Weather;

        [Description("Coefficient of x^3")]
        public double C3 { get; set; }

        [Description("Coefficient of x^2")]
        public double C2 { get; set; }

        [Description("Coefficient of x)")]
        public double C1 { get; set; }

        [Description("Intercept")]
        public double C0 { get; set; }

        [Description("Target period (negative to use regression; set 0 to keep at 350 ppm; or 2030-2050)")]
        public double Target { get; set; }

        [Description("RCP scenario (only used if Target>0)")]
        public string RCP { get; set; }

        [Description("Keep CO2 at this level (only used if Target<0; negative to ignore)")]
        public double KeepAt { get; set; }

        [Description("Keep CO2 at this year's level (only used if Target<0; negative to ignore)")]
        public double KeepAtYear { get; set; }

        private double CO2;
        private double MonID;

        [EventSubscribe("DoWeather")]
        private void OnDoWeather(object sender, EventArgs e)
        {
            CO2 = -1;

            if (Target == 0)
            {
                CO2 = 350;
                
            } 
            else if (Target > 0)
            {
                if (Target == 2030)
                {
                    if (RCP == "RCP45")
                    {
                        CO2 = 438;
                    }
                    else
                    {
                        CO2 = 452;
                    }

                }
                else if (Target == 2050)
                {
                    if (RCP == "RCP45")
                    {
                        CO2 = 483;
                    }
                    else
                    {
                        CO2 = 546;
                    }
                }
            }
            else if (Target < 0)
            {
                if (KeepAt < 0)
                {
                    if (KeepAtYear < 0)
                    {
                        MonID = (Clock.Today.Year - 1) * 12 + (Clock.Today.Month - 1) + (Clock.Today.Day / 30) - 23483.5;
                    }
                    else
                    {
                        MonID = (KeepAtYear - 1) * 12 + 1 - 23483.5;
                    }
                    CO2 = (C3 * Math.Pow(MonID,3)) + (C2 * Math.Pow(MonID,2)) + (C1 * MonID) + C0;
                }
                else
                {
                    CO2 = KeepAt;
                }

                if (CO2 < 350)
                {
                    CO2 = 350; 
                }
            }
            
            Weather.CO2 = CO2;
        }
    }
}
```
        Manager Harvest
          Crop = [Maize]
```csharp
using APSIM.Shared.Utilities;
using Models.Utilities;
using Models.Soils;
using Models.PMF;
using Models.Core;
using System;
using System.Linq;

namespace Models
{
    [Serializable] 
    public class Script : Model
    {
    	[Link(ByName=true)] private Manager AutoIrrigate;
    	[Link(ByName=true)] private Manager Sowing;
    	
        [Description("Crop")]
        public IPlant Crop { get; set; }
        
        public double SwChange {get;set;}
        
        
        [EventSubscribe("DoManagement")]
        private void OnDoManagement(object sender, EventArgs e)
        {        	
            if (Crop.IsReadyForHarvesting)
            {
                SwChange = (double)AutoIrrigate.GetProperty("AvailSw");
                SwChange = SwChange - (double)Sowing.GetProperty("SowSW");
                Crop.Harvest();
                Crop.EndCrop();                
                
            } else {
            	SwChange = -999;
            }
        }
    }
}
```
        Plant Maize
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