Simulations: Version=176
  DataStore
  Experiment Exp
    Factors
      Permutation For
        Factor Lead: Specification=[AutoIrrigate].Script.Lead = 3, 7
        Factor Prob: Specification=[AutoIrrigate].Script.Prob = 20, 40, 60, 80
        Factor MaxErr: Specification=[AutoIrrigate].Script.MaxErr = 100
        Factor DelayFrac: Specification=[AutoIrrigate].Script.DelayFrac = 0.5, 1.0
        Factor NLevel
          CompositeFactor 150
            Specifications:
              [Sowing].Script.InitNLays = 4
              [Sowing].Script.InitN = 60
              [StageFertilising].Script.Amount = 90
          CompositeFactor 300
            Specifications:
              [Sowing].Script.InitNLays = 4
              [Sowing].Script.InitN = 120
              [StageFertilising].Script.Amount = 180
        Factor IrrSys
          CompositeFactor Furrow
            Specifications:
              [AutoIrrigate].Script.FASWDepth = 1000
              [AutoIrrigate].Script.FASWThreshold = 0.50
              [AutoIrrigate].Script.IrrEff = 0.50
              [AutoIrrigate].Script.MinGap = 5
          CompositeFactor Sprinkler
            Specifications:
              [AutoIrrigate].Script.FASWDepth = 600
              [AutoIrrigate].Script.FASWThreshold = 0.75
              [AutoIrrigate].Script.IrrEff = 0.90
              [AutoIrrigate].Script.MinGap = 2
    Simulation Base
      Clock: Start=1984-01-01; End=2024-02-28
      Summary
      Weather
        FileName=C:\Users\U8019357\OneDrive - UniSQ\00_Projects\2024.04.26 Short-Term Forecast for Irrigation Management\04_Data\Weather Files\Modified\AU-Emerald.met
      SoilArbitrator
      MicroClimate: a_interception=0; b_interception=1; c_interception=0; d_interception=0; SoilHeatFluxFraction=0.4; MinimumHeightDiffForNewLayer=0; NightInterceptionFraction=0.5; ReferenceHeight=2
      Zone Field: Area=1; Slope=0; AspectAngle=0; Altitude=50
        Manager AutoIrrigate
          Crop = [Maize]
          AutoIrrigationOn = True
          IrrEff = 0.5
          FASWRef = LL
          FASWThreshold = 0.7
          FASWDepth = 900
          IrrigDepth = -99
          AfterSowing = 0
          MinGap = 2
          Lead = 3
          Lag = 7
          Prob = 0
          MissProb = 0
          FAlarmProb = 0
          MaxErr = 0
          SuffFrac = 0.5
          DelayFrac = 1
```csharp
using Models.Interfaces;
using System;
using System.Linq;
using Models.Core;
using System.Collections.Generic;
using System.Text;
using Models.Soils;
using Models.PMF;
using Models.Climate;
using Models;
using System.Xml.Serialization;
using APSIM.Shared.Utilities;
using Models.Interfaces;

namespace Models
{
	[Serializable]
	public class Script : Model
	{
		[Link] private Plant plant;
		[Link] private Zone zone;
		[Link] private Irrigation irrigation;
		[Link] private Soil soil;
		[Link] private ISoilWater waterBalance;
		[Link] private IPhysical soilPhysical;
		[Link] private Weather weather;
		[Link] private ISummary summary;
		
		/// ===================================================================================================				  		
		[Description("Crop to irrigate")]
		public IPlant Crop {get; set;}
		
		[Description("Auto irrigation on?")]
		public bool AutoIrrigationOn {get; set;}
		
		[Separator("Irrigation Parameters")]
		[Description("Irrigation efficiency (0-1)")]
		public double IrrEff {get; set;}
		
		[Description("Fraction referce (LL or LL15)")]
		public string FASWRef {get; set;}
		
		[Description("Threshold fraction available water (0-1)")]
		public double FASWThreshold {get; set;}
		
		[Description("Soil depth (mm) to calculate fraction available water. Negative will use hard-coded values.")]
		public double FASWDepth {get; set;}
		
		[Description("Irrigation depth (mm). Negative will be ignored.")]
		public double IrrigDepth {get; set;}
		
		[Description("Minimum days after sowing for first irrigation")]
		public int AfterSowing {get; set;}
		
		[Description("Minimum days between two irrigations")]
		public double MinGap {get; set;}
		
		/// ===================================================================================================
		[Separator("Forecast Parameters")]
		[Description("Lead time (days).")]
		public int Lead {get; set;}
		
		[Description("Lag time to calculate MeanETc (days).")]
		public int Lag {get; set;}
		
		[Description("If non-negative, it will replace other two probabilities.")]
		public double Prob {get; set;}
		
		[Description("Chance of missing rainfall events (%).")]
		public double MissProb {get; set;}
		
		[Description("Chance of falsly forecasting rainfall events (%).")]
		public double FAlarmProb {get; set;}
		
		[Description("Maximum error in forecasting rain depth (%).")]
		public double MaxErr {get; set;}
		
		[Description("Fraction of Lead*MeanETc to determine rainfall sufficiency.")]
		public double SuffFrac {get; set;}
		
		[Description("Fraction of Lead as maximum allowable delay.")]
		public double DelayFrac {get; set;}
		
		/// ===================================================================================================
		public int Rep {get; set;}
		public double AvailSw {get; set;}
		public double FASW {get; set;}
		public double MeanETc {get; set;}
		public double MaxETc {get; set;}
		public double ReqFutureRain {get; set;}
		public double TotFutureRain {get; set;}
		public double TotFutureRainFor {get; set;}
		public double RainDepthError {get; set;}
		public bool IrrigNeeded {get; set;} = false;
		public bool IrrigAllowed {get; set;} = false;
		public bool DidHit {get; set;}
		public bool DoMiss {get; set;}
		public bool DoFalseAlarm {get; set;}
		public int NumIrrig {get; set;}
		public int NumHits {get; set;}
		public int NumMisses {get; set;}
		public int NumFalseAlarms {get; set;}
		public int IrrDelay {get; set;}
		public double randX {get; set;}
		public double randY {get; set;}
		public double randZ {get; set;}
		public double SwChange {get; set;}
		private double irrigationGap = 0;
		private double[] ETc = new double[20];
		private SoilCrop soilCropData;
		private int nlayr;
		private double cumdep;
		private double part_layer;
		private double totalPAWC;
		
		/// ===================================================================================================		        
		[EventSubscribe("DoWeather")]
		private void OnDoWeather(object sender, EventArgs e)
		{
			if (Lead <= 0)
			{
				IrrigAllowed = true;
				ReqFutureRain = 0;
				MaxETc = -999;
			} else if (plant.IsAlive)
			{
				var rand = new Random();
				TotFutureRainFor = 0;
				TotFutureRain = weather.Rain;
				for (int l = 1; l < Lead; l++)
				{
					string col = "rain_l" + l.ToString();
					TotFutureRain += weather.GetValue(col);
				}
				randX = rand.Next(0, 100);
				randY = rand.Next(0, 100);
				randZ = MaxErr==0 ? 0 : rand.Next(-(int)MaxErr, (int)MaxErr);
				DoMiss = MissProb==0 ? false : (randX < MissProb);
				DoFalseAlarm = FAlarmProb==0 ? false : (randY < FAlarmProb);
				DidHit = false;
				MeanETc = 0;
				for (int l = Lag - 2; l >= 0; l--)
				{
					ETc[l+1] = ETc[l];
				}
				ETc[0] = plant.Leaf.WaterDemand + waterBalance.Es;
				MeanETc = ETc.Average();
				MaxETc = Math.Max(MaxETc, ETc.Max());
				if (SuffFrac > 0)
				{
					ReqFutureRain = SuffFrac * Lead * MeanETc;
				} else
				{
					ReqFutureRain = Math.Abs(SuffFrac) * Lead;
				}
				RainDepthError = 0;
				if (TotFutureRain >= ReqFutureRain)
				{
					// In reality, rainfall will occur and it will be sufficient to meet crop requirement over next 'halfLead' days.
					if (DoMiss)
					{
						// If DoMiss==true, forecast wrongly misses rainfall.
						IrrigAllowed = true;
					} else
					{
						// If DoMiss==false, forecast correctly shows rainfall, but its depth have MaxErr% error.
						RainDepthError = randZ;
						TotFutureRainFor = Math.Max(0, TotFutureRain * (100 + randZ) / 100);
						IrrigAllowed = (TotFutureRainFor < ReqFutureRain);
						DidHit = !IrrigAllowed;
						if (DidHit) DoFalseAlarm = false;
						}
				} else
				{
					// In reality, rainfall will NOT occur or it will NOT be sufficient to meet crop requirement over next 'halfLead' days.
					DoMiss = DidHit = false;
					if (DoFalseAlarm)
					{
						IrrigAllowed = false;
						TotFutureRainFor = 999;
					} else
					{
						IrrigAllowed = true;
						TotFutureRainFor = 0;
					}
				}
			} else
			{
				IrrigAllowed = false;
				NumHits = 0;
				NumMisses = 0;
				NumFalseAlarms = 0;
				MaxETc = 0;
			}
		}
		
		/// ===================================================================================================              
		[EventSubscribe("StartOfSimulation")]
		private void ErrorChecking(object sender, EventArgs args)
		{
			if (Crop == null)
				throw new Exception("No crop was specified in script " + Parent.Name);
			Array.Resize(ref ETc, Lag);
			MaxETc = -999;
			IrrDelay = 0;
			if (Prob >= 0)
			{
				MissProb = Prob;
				FAlarmProb = Prob;
			}
			soilCropData = soil.FindDescendant<SoilCrop>("MaizeSoil");
			nlayr = GetLayerIndex(FASWDepth);
			cumdep = MathUtilities.Sum(soilPhysical.Thickness, 0, nlayr, 0.0);
			part_layer = MathUtilities.Divide((FASWDepth - cumdep), soilPhysical.Thickness[nlayr], 0.0);
			if (FASWRef == "LL")
			{
				totalPAWC = MathUtilities.Sum(soilPhysical.PAWCmm, 0, nlayr, 0.0) + part_layer * soilPhysical.PAWCmm[nlayr];
			} else
			{
				totalPAWC = (MathUtilities.Sum(soilPhysical.DULmm, 0, nlayr, 0.0) + part_layer * soilPhysical.DULmm[nlayr]) -
				(MathUtilities.Sum(soilPhysical.LL15mm, 0, nlayr, 0.0) + part_layer * soilPhysical.LL15mm[nlayr]);
			}
			if (IrrigDepth < 0)
			{
				IrrigDepth = Math.Round((1-FASWThreshold)*totalPAWC/IrrEff, 0);
			}
		}
		
		/// ===================================================================================================              
		[EventSubscribe("StartOfDay")]
		private void OnStartOfDay(object sender, EventArgs args)
		{
			CalculateFASW();
		}
		
		/// ===================================================================================================         
		[EventSubscribe("DoManagement")]
		private void OnDoManagement(object sender, EventArgs e)
		{
			if (AutoIrrigationOn && plant.IsAlive)
			{
				irrigationGap += 1; // increment gap between irrigations               
				if (FASW < FASWThreshold && irrigationGap >= MinGap)
				{
					IrrigNeeded = true;
					if (IrrigAllowed || IrrDelay >= DelayFrac*Lead)
					{
						irrigation.Apply(IrrigDepth, depth: 0, willRunoff: true);
						irrigationGap = 0;
						IrrDelay = 0;
						NumIrrig += 1;
						if (DoMiss) NumMisses += 1;
						} else
					{
						IrrDelay += 1;
						if (DidHit) NumHits += 1;
							if (DoFalseAlarm) NumFalseAlarms += 1;
						}
				} else
				{
					IrrigNeeded = false;
					IrrDelay = 0;
				}
			}
			else
			{
				IrrigNeeded = false;
				irrigationGap = MinGap - AfterSowing - 1; // allow irrigation a number of days after it becomes alive/sown
				NumIrrig = 0;
				IrrDelay = 0;
			}
		}
		
		/// ===================================================================================================         
		private void CalculateFASW()
		{
			if (FASWRef == "LL")
			{
				AvailSw = MathUtilities.Sum(MathUtilities.Subtract(waterBalance.SWmm, soilCropData.LLmm), 0, nlayr, 0.0) +
						part_layer * (waterBalance.SWmm[nlayr] - soilCropData.LLmm[nlayr]);
				
			} else
			{
				AvailSw = MathUtilities.Sum(MathUtilities.Subtract(waterBalance.SWmm, soilPhysical.LL15mm), 0, nlayr, 0.0) +
						part_layer * (waterBalance.SWmm[nlayr] - soilPhysical.LL15mm[nlayr]);
			}
			AvailSw = Math.Max(0, AvailSw);
			FASW = MathUtilities.Divide(AvailSw, totalPAWC, 0.0);
		}
		
		private int GetLayerIndex(double pointDepth)
		{
			double[] cumThickness = soilPhysical.ThicknessCumulative;
			int layerIdx = 0;
			while ((layerIdx + 1 < cumThickness.Length) && (pointDepth > cumThickness[layerIdx]))
			{
				layerIdx += 1;
			}
			return layerIdx;
		}
	}
}
```
        Report ReportHarvest: EventNames=[Maize].Harvesting
          VariableNames:
            [Clock].Today as Today
            [Clock].Today.DayOfYear as DayOfYear
            [Maize].SowingDate.Year as SowYear
            [Clock].Today.Year as HarvestYear
            [Maize].DaysAfterSowing as DaysAfterSowing
            [Maize].Phenology.Stage as Stage
            [Maize].Phenology.AccumulatedTT as AccumulatedTT
            [Maize].Phenology.EmergenceDAS as EmergenceDAS
            [Maize].Phenology.FloweringDAS as FloweringDAS
            [Maize].Phenology.MaturityDAS as MaturityDAS
            [Maize].Grain.Total.Wt * 10 as Yield
            [Maize].AboveGround.Wt as AboveGroundWt
            [Maize].Grain.N * 10 as TotalGrainN
            [AutoIrrigate].Script.NumHits as NumHits
            [AutoIrrigate].Script.NumMisses as NumMisses
            [AutoIrrigate].Script.NumFalseAlarms as NumFalseAlarms
            [AutoIrrigate].Script.NumIrrig as NumIrrig
            [AutoIrrigate].Script.IrrigDepth as IrrigDepth
            Sum of [Irrigation].IrrigationApplied from [Maize].Sowing to [Maize].Harvesting as TotalIrrig
            Sum of [SoilWater].Drainage from [Maize].Sowing to [Maize].Harvesting as TotalDrain
            Sum of [SoilWater].Runoff from [Maize].Sowing to [Maize].Harvesting as TotalRunoff
            Sum of [Maize].Leaf.Transpiration from [Maize].Sowing to [Maize].Harvesting as TotalTransp
            Sum of [ISoilWater].Es from [Maize].Sowing to [Maize].Harvesting as TotalEP
            Sum of ([Maize].Leaf.Transpiration+[ISoilWater].Es) from [Maize].Sowing to [Maize].Harvesting as TotalETc
            Sum of [ISoilWater].Eo from [Maize].Sowing to [Maize].Harvesting as TotalETo
            Sum of [Weather].Rain from [Maize].Sowing to [Maize].Harvesting as InCropRain
            [Harvest].Script.SwChange as SwChange
            Sum of ([SoilWater].LeachNH4 + [SoilWater].LeachNO3 + [SoilWater].LeachUrea) from [Maize].Sowing to [Maize].Harvesting as TotalNLeach
            Sum of [Maize].Root.NUptake from [Maize].Sowing to [Maize].Harvesting as TotalNUptake
            Sum of Sum([Nutrient].Catm) from [Maize].Sowing to [Maize].Harvesting as TotalCatm
            Sum of Sum([Nutrient].Natm) from [Maize].Sowing to [Maize].Harvesting as TotalNatm
            Sum of Sum([Nutrient].N2Oatm) from [Maize].Sowing to [Maize].Harvesting as TotalN2Oatm
            Sum of Sum([Nutrient].DenitrifiedN) from [Maize].Sowing to [Maize].Harvesting as TotalDenitr
            Sum of Sum([Nutrient].NitrifiedN) from [Maize].Sowing to [Maize].Harvesting as TotalNitr
        Report ReportDaily
          VariableNames:
            [Clock].Today as Today
            [Clock].Today.DayOfYear as DayOfYear
            [Maize].Phenology.Stage as Stage
            [Fertiliser].NitrogenApplied as NitrogenApplied
            Sum([Soil].NO3.kgha) as NO3
            [Maize].SowingDate.Year as SowYear
            [Maize].DaysAfterSowing as DaysAfterSowing
            [Maize].IsAlive as IsAlive
            [AutoIrrigate].Script.AvailSw as AvailSw
            [Sowing].Script.SowSW as SowSW
            [Harvest].Script.SwChange as SwChange
            [Maize].Phenology.Stage as Stage
            [Maize].Phenology.CurrentPhaseName as CurrentPhaseName
            [Maize].Phenology.AccumulatedTT as AccumulatedTT
            [Fertiliser].NitrogenApplied as NitrogenApplied
            [Irrigation].IrrigationApplied as Irrigation
            [SoilWater].Runoff as Runoff
            [SoilWater].Drainage as Drainage
            [AutoIrrigate].Script.MeanETc as MeanETc
            [AutoIrrigate].Script.MaxETc as MaxETc
            [AutoIrrigate].Script.ReqFutureRain as ReqFutureRain
            [AutoIrrigate].Script.TotFutureRain as TotFutureRain
            [AutoIrrigate].Script.TotFutureRainFor as TotFutureRainFor
            [AutoIrrigate].Script.IrrigNeeded as IrrigNeeded
            [AutoIrrigate].Script.IrrigAllowed as IrrigAllowed
            [AutoIrrigate].Script.IrrDelay as IrrDelay
            [Irrigation].IrrigationApplied as Irrigation
            [AutoIrrigate].Script.DidHit as DidHit
            [AutoIrrigate].Script.randX as randX
            [AutoIrrigate].Script.DoMiss as DoMiss
            [AutoIrrigate].Script.randY as randY
            [AutoIrrigate].Script.DoFalseAlarm as DoFalseAlarm
            [AutoIrrigate].Script.randZ as randZ
            [AutoIrrigate].Script.RainDepthError as RainDepthError
            [AutoIrrigate].Script.FASW as FASW
            [Weather].Rain as Rain
            Sum([Nutrient].Natm) as Natm
            Sum([Nutrient].N2Oatm) as N2Oatm
            Sum([Denitrification].Value) as DenitrificationValue
            Sum([Denitrification].Natm) as DenitrificationNatm
            Sum([Nitrification].Value) as NitrificationValue
            Sum([Nitrification].Natm) as NitrificationNatm
          EventNames:
            [Maize].IsAlive == true
            // (bool)AutoIrrigate.GetProperty("IrrigNeeded") == true && (bool)AutoIrrigate.GetProperty("IrrigAllowed") == false
            // [Clock].StartOfDay
        Soil: ASCOrder=NA; ASCSubOrder=NA; SoilType=Haplic Vertisols; Site=NA; NearestTown=NA; Region=NA; State=NA; Country=Australia; NaturalVegetation=NA; ApsoilNumber=9999; Latitude=-23.625; Longitude=148.125; LocationAccuracy=+- 250 m; DataSource=ISRIC SoilGrids
          Water: Thickness=[150, 150, 150, 150, 200, 200, 200, 200]; InitialValues=[0.2, 0.205, 0.212, 0.217, 0.22, 0.22, 0.219, 0.217]; InitialPAWmm=69.65; RelativeTo=LL15; FilledFromTop=true
          Physical
            Thickness  ParticleSizeClay  ParticleSizeSand  ParticleSizeSilt  Rocks  BD     AirDry  LL15   DUL    SAT
            150        32.3              55.7              13                0      1.347  0.067   0.112  0.325  0.479
            150        34.5              53.5              12.5              0      1.402  0.068   0.12   0.324  0.463
            150        36.8              51.2              12                0      1.441  0.071   0.133  0.321  0.452
            150        38.2              49.8              12                0      1.462  0.072   0.15   0.319  0.444
            200        38.7              49.2              12.2              0      1.477  0.073   0.168  0.317  0.439
            200        38.2              49.8              12.8              0      1.486  0.073   0.184  0.314  0.436
            200        38                50.1              12.9              0      1.489  0.073   0.2    0.311  0.433
            200        38                50.3              12.7              0      1.488  0.072   0.215  0.304  0.429
            Rocks source: Calculated
            SoilCrop MaizeSoil: LL=[0.141, 0.15, 0.163, 0.18, 0.198, 0.214, 0.23, 0.245]; KL=[0.06, 0.06, 0.06, 0.055, 0.048, 0.04, 0.032, 0.024]; XF=[1, 1, 1, 1, 1, 1, 1, 1]
          WaterBalance SoilWater: SummerDate=1-nov; SummerU=6; SummerCona=6; WinterDate=1-apr; WinterU=6; WinterCona=6; DiffusConst=15296.77; DiffusSlope=-6.25; Salb=0.12; CN2Bare=73; CNRed=20; CNCov=0; DischargeWidth=5; CatchmentArea=10; PSIDul=-100; Thickness=[150, 150, 150, 150, 200, 200, 200, 200]; SWCON=[0.5, 0.5, 0.5, 0.5, 0.5, 0.5, 0.5, 0.5]
          CERESSoilTemperature Temperature
          Solute NO3: Thickness=[150, 150, 150, 150, 200, 200, 200, 200]; InitialValues=[0, 0, 0, 0, 0, 0, 0, 0]; InitialValuesUnits=ppm; WaterTableConcentration=0; D0=0; DepthConstant=0; MaxDepthSoluteAccessible=0; RunoffEffectivenessAtMovingSolute=0; MaxEffectiveRunoff=0
          Solute NH4: same as Exp.Base.Field.Soil.NO3
          Solute Urea: Thickness=[150, 150, 150, 150, 200, 200, 200, 200]; InitialValues=[0, 0, 0, 0, 0, 0, 0, 0]; InitialValuesUnits=kg/ha; WaterTableConcentration=0; D0=0; DepthConstant=0; MaxDepthSoluteAccessible=0; RunoffEffectivenessAtMovingSolute=0; MaxEffectiveRunoff=0
          Organic: FOMCNRatio=40; CarbonUnits=Total
            Thickness  Carbon  SoilCNRatio  FBiom  FInert  FOM
            150        1.571   10.7         0.04   0.346   97.03
            150        1.073   10.7         0.031  0.486   77.48
            150        0.769   10.7         0.014  0.66    61.869
            150        0.604   10.7         0.01   0.829   49.404
            200        0.476   10.7         0.01   0.99    36.599
            200        0.382   10.7         0.01   0.99    27.113
            200        0.333   10.7         0.01   0.99    20.086
            200        0.328   10.7         0.01   0.99    14.88
          Chemical: Thickness=[150, 150, 150, 150, 200, 200, 200, 200]; PH=[6.93, 7.05, 7.15, 7.25, 7.35, 7.45, 7.51, 7.53]; PHUnits=Water
          Nutrient
          CERESSoilTemperature SoilTemperature
        Fertiliser
        SurfaceOrganicMatter: InitialResidueName=wheat_stubble; InitialResidueType=wheat; InitialResidueMass=0; InitialStandingFraction=0; InitialCPR=0; InitialCNR=100
        Irrigation
        Manager Sowing
          Crop = [Maize]
          SowDate = 15-Sep
          CultivarName = Pioneer_3153
          SowingDepth = 30
          RowSpacing = 750
          Population = 8
          OffsetDays = 0
          InitSWPerc = 50
          InitN = 0
          InitNLays = 4
          ResetWater = Yes
          ResetNutrients = Yes
          ResetSOM = Yes
```csharp
using Models.Soils.Nutrients;
using APSIM.Shared.Utilities;
using Models.Surface;
using Models.Utilities;
using Models.Soils.Nutrients;
using Models.Soils;
using Models.PMF;
using Models.Core;
using System;
using System.Linq;
using Models.Interfaces;

namespace Models
{
    [Serializable]
    public class Script : Model
    {       
        [Link] private Clock Clock;
        [Link] private ISoilWater soilWater;
        [Link] private Physical soilPhysical;
        [Link] private Nutrient nutrient;
        [Link] private SurfaceOrganicMatter SOM;
        [Link] private Summary summary;  
        [Link(ByName=true)] private Manager AutoIrrigate;
        
        [Description("Crop")]
        public IPlant Crop { get; set; }

        [Description("Sowing date (d-mmm)")]
        public string SowDate { get; set; }

        [Display(Type = DisplayType.CultivarName)]
        [Description("Cultivar to be sown")]
        public string CultivarName { get; set; }

        [Description("Sowing depth (mm)")]
        public double SowingDepth { get; set; }

        [Description("Row spacing (mm)")]
        public double RowSpacing { get; set; }

        [Description("Plant population (/m2)")]
        public double Population { get; set; }
        
        [Description("Offset by Days (Negative is Days Before, Positive is Days After)")]
        public int OffsetDays {get;set;}

        [Description("Initial Soil Moisture Relative to LL15 (% - Negative Will be Ignored)")]
        public double InitSWPerc {get;set;} = -1;

        [Description("Initial Soil N (kg/ha - Negative Will be Ignored)")]
        public double InitN {get;set;} = -1;
        
        [Description("Initial Soil N Divided Among How Many Layers?")]
        public int InitNLays {get;set;} = 4;        
                
        [Description("Reset Water? (Yes or No)")]
        public string ResetWater {get;set;}

        [Description("Reset Soil Nutrients ? (Yes or No)")]
        public string ResetNutrients {get;set;}

        [Description("Reset Surface Organic Matter? (Yes or No)")]
        public string ResetSOM {get;set;}
        
        public int SowYear {get;set;}
        public double SowSW {get;set;}   
                 
        
        [EventSubscribe("DoManagement")]
        private void OnDoManagement(object sender, EventArgs e)
        {
            DateTime offsetDate = DateUtilities.GetDate(SowDate, Clock.Today).AddDays(OffsetDays);
            
            if (offsetDate.Equals(Clock.Today))
            {
                if (ResetWater == "Yes")
                {
                    summary.WriteMessage(this, "Reset Water", MessageType.Diagnostic);
                    
					if (InitSWPerc >= 0) {
						double[] newSW = new double[soilPhysical.DUL.Length];
						for (int layer = 0; layer < soilPhysical.DUL.Length; layer++)
						{
							newSW[layer] = soilPhysical.LL15[layer] + InitSWPerc * (soilPhysical.DUL[layer] - soilPhysical.LL15[layer]) / 100;
						}
						soilWater.SW = newSW;
						
					} else {
						soilWater.Reset();
					}                                        
                }
                if (ResetNutrients == "Yes")
                {
                    summary.WriteMessage(this, "Reset Nitrogen", MessageType.Diagnostic);
                    
					if (InitN >= 0) {	
						nutrient.NO3.kgha = new double[nutrient.NO3.kgha.Length];
						double[] newNO3 = new double[nutrient.NO3.kgha.Length];
						int nLayers = Math.Min(InitNLays, nutrient.NO3.kgha.Length);
						
						for (int layer = 0; layer < nLayers; layer++)
						{
							newNO3[layer] = InitN / nLayers;
						}
						nutrient.NO3.kgha = newNO3;
						
					} else {
						nutrient.Reset();
					}                                        
                }
                if (ResetSOM == "Yes")
                {
                    summary.WriteMessage(this, "Reset Surface OM", MessageType.Diagnostic);
                    SOM.Reset();
                }
            }
            
            if (DateUtilities.WithinDates(SowDate, Clock.Today, SowDate))
            {
                Crop.Sow(population: Population, cultivar: CultivarName, depth: SowingDepth, rowSpacing: RowSpacing); 
                SowYear = Clock.Today.Year; 
                SowSW = (double)AutoIrrigate.GetProperty("AvailSw");
            }
            
            if (!Crop.IsAlive) {
            	SowYear = 0;
            	SowSW = 0;
            }
        }        
    }
}
```
        Manager SowFertilising (disabled)
          Amount = 200
          Crop = [Maize]
          FertiliserType = NO3N
```csharp
using Models.Soils;
using System;
using System.Linq;
using Models.Core;
using Models.PMF;
namespace Models
{
    [Serializable]
    public class Script : Model
    {
        [Link] Clock Clock;
        [Link] Fertiliser Fertiliser;
        
        [Description("Crop to be fertilised")]
        public IPlant Crop { get; set; }

        [Description("Type of fertiliser to apply? ")] 
        public Fertiliser.Types FertiliserType { get; set; }
    
        [Description("Amount of fertiliser to be applied (kg/ha)")]
        public double Amount { get; set; }
        
        [EventSubscribe("Sowing")]
        private void OnSowing(object sender, EventArgs e)
        {
            Model crop = sender as Model;
            if (Crop != null && crop.Name.ToLower() == (Crop as IModel).Name.ToLower())
                Fertiliser.Apply(Amount: Amount, Type: FertiliserType);
        }
    }
}
```
        Manager StageFertilising
          VariableName = [Maize].Phenology.Stage
          TriggerValue = 3
          NumDaysToWait = 0
          Amount = 100
          FertiliserType = NO3N
```csharp
using Models.Soils;
using System;
using Models.Functions;
using Models.Core;
using Models.PMF;
using APSIM.Shared.Utilities;
using System.Diagnostics;
namespace Models
{
    [Serializable]
    public class Script : Model
    {
        [Link] Clock clock;
        [Link] Fertiliser fertiliser;
        [Link] Zone zone;
        [Link] ISummary summary;        
        
        [Separator("A model to apply fertiliser days after a variable reaches a threshold")]
        [Separator("Trigger to fertilse on")]
                 
        [Description("Name of APSIM variable")] 
        public string VariableName { get; set; } 
                
        [Description("Threshold value to trigger fertilise")]       
        public double TriggerValue { get; set; }
        
        [Description("Number of days to wait after trigger")] 
        public int NumDaysToWait { get; set; }  
               
        [Separator("Amount and type to fertilise")]
                 
        [Description("Amount of fertiliser to be applied (kg /ha)")] 
        public double Amount { get; set; }  
               
        [Description("Type of fertiliser to apply? ")] 
        public Fertiliser.Types FertiliserType { get; set; }   
          
        private DateTime FertiliseDate;         
        private bool wasTriggered;
        private bool wasApplied;
               
        [EventSubscribe("StartOfSimulation")]
        private void OnStartOfSimulation(object sender, EventArgs e)
        {        
        } 
        
        [EventSubscribe("Sowing")]
        private void OnSowing(object sender, EventArgs e)
        {
        	wasTriggered = false;
        	wasApplied = false;
        }                       
               
        [EventSubscribe("DoManagementCalculations")]
        private void OnDoManagementCalculations(object sender, EventArgs e)
        {
				var obj = zone.Get(VariableName);
	            double value;
	            if (obj is double)
	                value = (double) obj;
	            else if (obj is IFunction f)
	                value = f.Value();
	            else
	                throw new Exception($"Unknown type of variable: {VariableName}");	                	           
	                 
	            if (!wasTriggered && MathUtilities.IsGreaterThanOrEqual(value, TriggerValue)) {
	                FertiliseDate = clock.Today.AddDays(NumDaysToWait);
	                wasTriggered = true;                
	            }

	            if (!wasApplied && clock.Today == FertiliseDate) {
	            	fertiliser.Apply(Amount: Amount, Type: FertiliserType);	
	            	wasApplied = true;
	            }	                          
        }
    }
}
```
        Manager CO2Trend
          C3 = 1.4507E-08
          C2 = 8.01174e-05
          C1 = 0.057666
          C0 = 314.802402
          Target = -1
          RCP = RCP85
          KeepAt = -1
          KeepAtYear = -1
```csharp
using Models.Soils.Nutrients;
using APSIM.Shared.Utilities;
using Models.Surface;
using Models.Utilities;
using Models.Soils.Nutrients;
using Models.Soils;
using Models.PMF;
using Models.Core;
using System;
using System.Linq;
using Models.Interfaces;

namespace Models
{
    [Serializable]
    public class Script : Model
    {
        [Link] private Clock Clock;
        [Link] private IWeather Weather;

        [Description("Coefficient of x^3")]
        public double C3 { get; set; }

        [Description("Coefficient of x^2")]
        public double C2 { get; set; }

        [Description("Coefficient of x)")]
        public double C1 { get; set; }

        [Description("Intercept")]
        public double C0 { get; set; }

        [Description("Target period (negative to use regression; set 0 to keep at 350 ppm; or 2030-2050)")]
        public double Target { get; set; }

        [Description("RCP scenario (only used if Target>0)")]
        public string RCP { get; set; }

        [Description("Keep CO2 at this level (only used if Target<0; negative to ignore)")]
        public double KeepAt { get; set; }

        [Description("Keep CO2 at this year's level (only used if Target<0; negative to ignore)")]
        public double KeepAtYear { get; set; }

        private double CO2;
        private double MonID;

        [EventSubscribe("DoWeather")]
        private void OnDoWeather(object sender, EventArgs e)
        {
            CO2 = -1;

            if (Target == 0)
            {
                CO2 = 350;
                
            } 
            else if (Target > 0)
            {
                if (Target == 2030)
                {
                    if (RCP == "RCP45")
                    {
                        CO2 = 438;
                    }
                    else
                    {
                        CO2 = 452;
                    }

                }
                else if (Target == 2050)
                {
                    if (RCP == "RCP45")
                    {
                        CO2 = 483;
                    }
                    else
                    {
                        CO2 = 546;
                    }
                }
            }
            else if (Target < 0)
            {
                if (KeepAt < 0)
                {
                    if (KeepAtYear < 0)
                    {
                        MonID = (Clock.Today.Year - 1) * 12 + (Clock.Today.Month - 1) + (Clock.Today.Day / 30) - 23483.5;
                    }
                    else
                    {
                        MonID = (KeepAtYear - 1) * 12 + 1 - 23483.5;
                    }
                    CO2 = (C3 * Math.Pow(MonID,3)) + (C2 * Math.Pow(MonID,2)) + (C1 * MonID) + C0;
                }
                else
                {
                    CO2 = KeepAt;
                }

                if (CO2 < 350)
                {
                    CO2 = 350; 
                }
            }
            
            Weather.CO2 = CO2;
        }
    }
}
```
        Manager Harvest
          Crop = [Maize]
```csharp
using APSIM.Shared.Utilities;
using Models.Utilities;
using Models.Soils;
using Models.PMF;
using Models.Core;
using System;
using System.Linq;

namespace Models
{
    [Serializable] 
    public class Script : Model
    {
    	[Link(ByName=true)] private Manager AutoIrrigate;
    	[Link(ByName=true)] private Manager Sowing;
    	
        [Description("Crop")]
        public IPlant Crop { get; set; }
        
        public double SwChange {get;set;}
        
        
        [EventSubscribe("DoManagement")]
        private void OnDoManagement(object sender, EventArgs e)
        {        	
            if (Crop.IsReadyForHarvesting)
            {
                SwChange = (double)AutoIrrigate.GetProperty("AvailSw");
                SwChange = SwChange - (double)Sowing.GetProperty("SowSW");
                Crop.Harvest();
                Crop.EndCrop();                
                
            } else {
            	SwChange = -999;
            }
        }
    }
}
```
        Plant Maize
